// COMSOL Multiphysics 5.2.1.262 model "C-Core.mph"
// Outline of the model tree

Parameters
  Current = 120*10[A]
  Turn_Numb = 100

Variables
  var1 "Variables 1"
    Coil_Area = intop1(1)

Couplings
  intop1: Integration "Integration 1a" on domains 2

Geometry
  geom1 "Geometry 1" (2D, length unit m)
    r2: Rectangle | pos = {-0.05, -0.05}; size = {0.1, 0.1}
    r1: Rectangle | pos = {-0.03, -0.03}; size = {0.06, 0.06}
    r3: Rectangle | pos = {0.05-0.02, -0.005}; size = {0.02, 0.01}
    dif1: Difference | input = r2; input2 = r1, r3
    r4: Rectangle | pos = {-0.05-0.01-0.002, -0.03/2}; size = {0.01, 0.03}
    r5: Rectangle | pos = {-0.05-0.01+0.01+0.02+0.002, -0.03/2}; size = {0.01, 0.03}
    c1: Circle | r = 0.2
    pol1: Polygon | source = table; table = {{-0.05, 0}, {-0.03, 0}}
    fin: Finalize "Form Union"

Materials
  mat1: Common "Air" on all domains
    def "Basic"
      relpermeability = 1
      relpermittivity = 1
      dynamicviscosity = eta(T[1/K])[Pa*s]
      ratioofspecificheat = 1.4
      electricconductivity = 10[S/m]
      heatcapacity = Cp(T[1/K])[J/(kg*K)]
      density = rho(pA[1/Pa],T[1/K])[kg/m^3]
      thermalconductivity = k(T[1/K])[W/(m*K)]
      soundspeed = cs(T[1/K])[m/s]
      eta: Piecewise | arg = T; extrap = constant; pieces = {200.0, 1600.0, -8.38278E-7+8.35717342E-8*T^1-7.69429583E-11*T^2+4.6437266E-14*T^3-1.06585607E-17*T^4}
      Cp: Piecewise | arg = T; extrap = constant; pieces = {200.0, 1600.0, 1047.63657-0.372589265*T^1+9.45304214E-4*T^2-6.02409443E-7*T^3+1.2858961E-10*T^4}
      rho: Analytic | expr = pA*0.02897/8.314/T; args = {pA, T}; dermethod = manual; argders = {{pA, d(pA*0.02897/8.314/T,pA)}, {T, d(pA*0.02897/8.314/T,T)}}
      k: Piecewise | arg = T; extrap = constant; pieces = {200.0, 1600.0, -0.00227583562+1.15480022E-4*T^1-7.90252856E-8*T^2+4.11702505E-11*T^3-7.43864331E-15*T^4}
      cs: Analytic | expr = sqrt(1.4*287*T); args = T; dermethod = manual; argders = {T, d(sqrt(1.4*287*T),T)}
    RefractiveIndex
      n = 1
      ki = 0
  mat2: Common "Copper" on domains 2, 5
    def "Basic"
      relpermeability = 1
      electricconductivity = 5.998e7[S/m]
      thermalexpansioncoefficient = 17e-6[1/K]
      heatcapacity = 385[J/(kg*K)]
      relpermittivity = 1
      density = 8960[kg/m^3]
      thermalconductivity = 400[W/(m*K)]
    Enu "Young's modulus and Poisson's ratio"
      youngsmodulus = 110e9[Pa]
      poissonsratio = 0.35
    linzRes "Linearized resistivity"
      rho0 = 1.72e-8[ohm*m]
      alpha = 0.0039[1/K]
      Tref = 298[K]
  mat5: Common "Stainless Steel Annealed TAF" on domains 3, 4
    def "Basic"
      electricconductivity = 1.3[MS/m]
      relpermittivity = 1[1]
      relpermeability = 1
    HBCurve
      normH = HBCurve1(normB[1/(T)])[A/m]
      normB = sqrt(B1^2+B2^2+B3^2)
      HBCurve1: Interpolation
        table = 
          {0, 0}
          {0.00183512375, 0.263071894609}
          {0.00421075, 2.016013251875}
          {0.00766738125, 6.74869353445}
          {0.01274552, 15.950982205}
          {0.0198416707552, 30.6517963372396}
          {0.0287763460417, 50.0362434491667}
          {0.0392260603906, 72.8284786698437}
          {0.0508673283333, 97.7526571283333}
          {0.0634308878125, 123.568758472161}
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        extrap = linear
    BHCurve
      normB = BHCurve1(normH[1/(A/m)])[T]
      normH = sqrt(H1^2+H2^2+H3^2)
      BHCurve1: Interpolation
        table = 
          {0, 0}
          {0.263071894609, 0.00183512375}
          {2.016013251875, 0.00421075}
          {6.74869353445, 0.00766738125}
          {15.950982205, 0.01274552}
          {30.6517963372396, 0.0198416707552}
          {50.0362434491667, 0.0287763460417}
          {72.8284786698437, 0.0392260603906}
          {97.7526571283333, 0.0508673283333}
          {123.568758472161, 0.0634308878125}
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        extrap = linear
  mat6: Common "Steel AISI 4340" (disabled) on domains 3, 4
    def "Basic"
      relpermeability = 1000
      electricconductivity = 4.032e6[S/m]
      thermalexpansioncoefficient = 12.3e-6[1/K]
      heatcapacity = 475[J/(kg*K)]
      relpermittivity = 1
      density = 7850[kg/m^3]
      thermalconductivity = 44.5[W/(m*K)]
    Enu "Young's modulus and Poisson's ratio"
      youngsmodulus = 205e9[Pa]
      poissonsratio = 0.28
  mat15: Common "Alloy Powder Core Ferrite" (disabled) on domains 3, 4
    def "Basic"
      electricconductivity = 1e-12[MS/m]
      relpermittivity = 1[1]
    HBCurve
      normH = HBCurve1(normB[1/(T)])[A/m]
      normB = sqrt(B1^2+B2^2+B3^2)
      HBCurve1: Interpolation
        table = 
          {0, 0}
          {0.0170723958333, 11.0513169270833}
          {0.0332291666667, 21.4577354166667}
          {0.0475546875, 30.57435703125}
          {0.0591333333333, 37.7562833333333}
          {0.0673731770833, 42.5813994791667}
          {0.0729770833333, 45.518725}
          {0.0769716145833, 47.2600630208333}
          {0.0803833333333, 48.4972166666667}
          {0.0840239583333, 49.7898346354167}
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        extrap = linear
    BHCurve
      normB = BHCurve1(normH[1/(A/m)])[T]
      normH = sqrt(H1^2+H2^2+H3^2)
      BHCurve1: Interpolation
        table = 
          {0, 0}
          {11.0513169270833, 0.0170723958333}
          {21.4577354166667, 0.0332291666667}
          {30.57435703125, 0.0475546875}
          {37.7562833333333, 0.0591333333333}
          {42.5813994791667, 0.0673731770833}
          {45.518725, 0.0729770833333}
          {47.2600630208333, 0.0769716145833}
          {48.4972166666667, 0.0803833333333}
          {49.7898346354167, 0.0840239583333}
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        extrap = linear

Physics
  mef: ElectricInductionCurrents "Magnetic and Electric Fields" on all domains
    dependent variable A = {Ax, Ay, Az}
    alc1: ElectromagneticModel "Ampère's Law and Current Conservation 1" (default)
    mi1: MagneticInsulation (default)
      ein1: ElectricInsulation (default)
    init1: init "Initial Values 1" (default)
    alc2: ElectromagneticModel "Ampère's Law and Current Conservation 2" on domains 3, 4 | ConstitutiveRelationH = HBCurve
    ecd1: ExternalCurrentDensity on domains 2 | Je = {0, 0, Current*Turn_Numb/Coil_Area}
    ecd2: ExternalCurrentDensity on domains 5 | Je = {0, 0, -Current*Turn_Numb/Coil_Area}

Mesh
  mesh1 "Mesh 1"
    size: MeshSizeDefault | hmax = 0.0268; hmin = 1.2E-4; hcurve = 0.3; hnarrow = 1; hgrad = 1.3; hauto = 5
    ftri2: FreeTri "Free Triangular 2" on entire geometry
      size1: Size on domains 2-5 | hmax = 0.001; hauto = 1; custom = on
      size2: Size on domains 1 | hgrad = 1.1; hauto = 5; custom = on

Studies
  std1 "Study 1"
    stat: Stationary

Solver configurations
  sol1 "Solution 1" (study std1)
    v1: Variables "Dependent Variables 1"
    s1: Stationary "Stationary Solver 1"
      dDef: Direct
      fc1: FullyCoupled | linsolver = dDef

Datasets
  dset1: Solution | solution = sol1
  dset2: Solution "airgap line" on boundaries 8 | solution = sol1

Derived values
  int1: IntLine "Line Integration 1" on boundaries 8
    data = dset1
    table = tbl1
    expr = mef.normB*Turn_Numb/Current
    unit = H/m

Tables
  tbl1: Table
    // Line Integration 1 (mef.normB*Turn_Numb/Current)
    mef.normB*Turn_Numb/Current (H/m) | mef.normB*Turn_Numb/Current (H/m) | mef.normB*Turn_Numb/Current (H/m) | mef.normB*Turn_Numb/Current (H/m) | mef.normB*Turn_Numb/Current (H/m) | mef.normB*Turn_Numb/Current (H/m)
    0.0164669 | 0.0283786 | 0.010947 | 0.0164669 | 0.00912979 | 0.00663405

Plots
  pg1: PlotGroup2D "Magnetic Flux Density Norm (mef)" | data = dset1
    surf1: Surface | expr = mef.normB
    arws1: ArrowSurface | expr = {mef.Bx, mef.By}; xnumber = 100; ynumber = 100
  pg2: PlotGroup1D "1D Plot Group 2" | data = dset2
    lngr1: LineGraph on boundaries 8
      expr = mef.normB
      legends = Magnetic Flux Density Distribution on a line in the airgap